*Heading
** Job name: Test Model name: Model-1
** Generated by: Abaqus/CAE 2021
*Preprint, echo=NO, model=NO, history=NO, contact=NO
**
** PARTS
**
*Part, name=Part-1
*Node
      1,           0.,           0.
      2,  0.224999994,           0.
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*Element, type=CPS4
   1,    1,    2,   43,   42
   2,    2,    3,   44,   43
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*Nset, nset=Set-1, generate
1,  1681,  1
*Elset, elset=Set-1, generate
1,  1600,  1
*Solid section, elset=Set-1, material=Material-1
*End Part
**
*Material, name=Material-1
*Elastic
1.e-20, 0.3
**
** ASSEMBLY
**
*Assembly, name=Assembly
**
*Instance, name=Part-1-1, part=Part-1
*End Instance
**
*Nset, nset=Set-Left, instance=Part-1-1, generate
    1,  1641,    41
*Elset, elset=Set-Left, instance=Part-1-1, generate
    1,  1561,    40
*Nset, nset=Set-Right, instance=Part-1-1, generate
   82,  1640,    41
*Nset, nset=Set-two, instance=Part-1-1
   41, 1681
*End Assembly
** ----------------------------------------------------------------
**
** STEP: Step-1
**
*Step, name=Step-1, nlgeom=NO
*Static
1., 1., 1e-05, 0.25
**
** BOUNDARY CONDITIONS
**
** Name: BC-1 Type: Displacement/Rotation
*Boundary
Set-Left, 1, 1
Set-Left, 2, 2
**
** LOADS 根据实际情况自行加载，uel不能加载在surface上
**
** Name: Load-1   Type: Concentrated force
*Cload
Set-Right, 1, 0.0225
** Name: Load-2   Type: Concentrated force
*Cload
Set-two, 1, 0.01125
**
** OUTPUT REQUESTS
**
*Restart, write, frequency=0
**
** FIELD OUTPUT: F-Output-1
**
*Output, field, variable=PRESELECT
**
** HISTORY OUTPUT: H-Output-1
**
*Output, history, variable=PRESELECT
*EL print
SDV
*End Step
